// COMSOL Multiphysics 5.6.0.401 model "comsol1.mph"
// Outline of the model tree

Geometry
  geom1 "几何 1" (2D, length unit m)
    r1: Rectangle "矩形 1" | size = {0.6, 0.4}
    fin: Finalize "形成联合体"

Materials
  mat1: Common "材料 1" on all domains
    def "基本"
      thermalconductivity = 200
      density = 1000
      heatcapacity = 1

Physics
  ht: HeatTransfer "固体传热" on all domains
    dependent variable T
    solid1: SolidHeatTransferModel "固体 1" (default)
    init1: init "初始值 1" (default)
    ins1: ThermalInsulation "热绝缘 1" (default)
    temp1: TemperatureBoundary "温度 1" on boundaries 1, 2, 4 | T0 = 60+293.15[K]
    temp2: TemperatureBoundary "温度 2" on boundaries 3 | T0 = 60+(20+293.15[k])*sin(pi*X/0.6)+293.15[k]

Mesh
  mesh1 "网格 1"
    fq1: FreeQuad "自由四边形网格 1" on domains 1

Studies
  std1 "研究 1"
    stat: Stationary "稳态"

Solver configurations
  sol1 "解 1" (study std1)
    v1: Variables "因变量 1"
    s1: Stationary "稳态求解器 1"
      fc1: FullyCoupled "全耦合 1" | linsolver = d1; initstep = 0.01; minstep = 1.0E-6; maxiter = 50
      d1: Direct "直接，温度 (ht)" | linsolver = pardiso; pivotperturb = 1.0E-13

Datasets
  dset1: Solution | solution = sol1

Plots
  pg1: PlotGroup2D "温度 (ht)" | data = dset1
    surf1: Surface "表面" | expr = T
    surf2: Surface "表面 2" | expr = T
      hght1: Height "高度表达式 1" | expr = T
  pg2: PlotGroup2D "等温线 (ht)" | data = dset1
    con1: Contour "等值线" | expr = T; levelrounding = off
  pg3: PlotGroup3D "三维绘图组 3"
  pg4: PlotGroup2D "二维绘图组 4" | data = dset1
  pg5: PlotGroup2D "二维绘图组 5" | data = none
    tbls1: TableSurface "表格面图 1" | table = evl2
  pg6: PlotGroup1D "一维绘图组 6" | data = none
    tblp1: Table "表图 1" | table = evl2